<?xml version="1.0"?>


<?xml-stylesheet type="text/xsl" href="http://jsbsim.sourceforge.net/JSBSim.xsl"?>
<fdm_config name="unknown" release="BETA" version="2.0"

    xmlns:xsi="http://www.w3.org/2001/XMLSchema-instance"
    xsi:noNamespaceSchemaLocation="http://jsbsim.sourceforge.net/JSBSim.xsd">


<!--
    Search for 'unknown' and replace with real values before loading in JSBSim.
-->

   <fileheader>
      <author>DATCOM+</author>
      <filecreationdate>    </filecreationdate>
      <description>DATCOM model for a unknown</description>
      <version>  </version>
      <reference refID="None" author="n/a" title="n/a" date="n/a"/>
      <description>  </description>
   </fileheader>


<!--


  ****************** IMPORTANT NOTICES **********************

   This is an alpha version release of the DATCOM+ program for
   JSBSIM. Nothing, and I do mean NOTHING, as been checked to
   verify that the parameters, units, sign conventions, or
   basically anything else is correct. Your mileage may vary.

   ***********************************************************

   This file was generated by the USAF Digital DATCOM program.
   This file is considered an intermediary file in the
   DATCOM/JSBSim process. This file may be overwritten without
   warning, so any changes that you make in here may be lost.

   If you intend to use this file as it is and modify it, make
   sure that you take the necessary precautions to prevent it
   from being overwritten, like renaming it.
-->


<!-- **********************************************************************
        METRICS
     ********************************************************************** -->


   <metrics>
      <wingarea unit="FT2">     1329.9000  </wingarea>
      <wingspan unit="FT">        93.0000  </wingspan>
      <chord unit="FT">           14.3000  </chord>
      <htailarea unit="FT2">     290.4000  </htailarea>
      <htailarm unit="FT">        20.0908  </htailarm>
      <vtailarea unit="FT2">     285.6600  </vtailarea>
      <vtailarm unit="FT">        26.2738  </vtailarm>
      <location name="AERORP" unit="IN">
         <x> 43.2 </x>   FIX THIS
         <y>  0.0 </y>   FIX THIS
         <z> 59.4 </z>   FIX THIS
      </location>
      <location name="EYEPOINT" unit="IN">
         <x> 37.0 </x>   FIX THIS
         <y>  0.0 </y>   FIX THIS
         <z> 48.0 </z>   FIX THIS
      </location>
      <location name="VRP" unit="IN">
         <x> 42.6 </x>   FIX THIS
         <y>  0.0 </y>   FIX THIS
         <z> 38.5 </z>   FIX THIS
      </location>
   </metrics>


<!-- **********************************************************************
        MASS_BALANCE
     ********************************************************************** -->


   <mass_balance>
      <ixx unit="SLUG*FT2"> UNKNOWN </ixx>
      <iyy unit="SLUG*FT2"> UNKNOWN </iyy>
      <izz unit="SLUG*FT2"> UNKNOWN </izz>
      <ixz unit="SLUG*FT2"> UNKNOWN </ixz>
      <emptywt unit="LBS">          .0000  </emptywt>    FIX THIS
      <location name="CG" unit="IN">
            <x>   495.60  </x>
            <y>      .00  </y>
            <z>      .00  </z>
      </location>
      <pointmass name="PILOT">
         <weight unit="LBS"> 200.0 </weight>
         <location name="POINTMASS" unit="IN">
            <x> UNKNOWN </x>
            <y> UNKNOWN </y>
            <z> UNKNOWN </z>
         </location>
      </pointmass>
      <pointmass name="CO-PILOT">
         <weight unit="LBS"> 200.0 </weight>
         <location name="POINTMASS" unit="IN">
            <x> UNKNOWN </x>
            <y> UNKNOWN </y>
            <z> UNKNOWN </z>
         </location>
      </pointmass>
      <pointmass name="LUGGAGE">
         <weight unit="LBS"> 0.0 </weight>
         <location name="POINTMASS" unit="IN">
            <x> UNKNOWN </x>
            <y> UNKNOWN </y>
            <z> UNKNOWN </z>
         </location>
      </pointmass>
   </mass_balance>


<!-- **********************************************************************
        UNDERCARRIAGE
     ********************************************************************** -->


<!--

   DATCOM does not calculate ground reactions parameters.

-->


   <ground_reactions>

   </ground_reactions>


<!-- **********************************************************************
        PROPULSION
     ********************************************************************** -->


   <propulsion>
        <engine file="CFM56">
            <location unit="IN">
                <x>  540 </x>
                <y> -193 </y>
                <z>  -40 </z>
            </location>
            <orient unit="DEG">
                <roll>  0 </roll>
                <pitch> 0 </pitch>
                <yaw>   0 </yaw>
            </orient>
            <feed>0</feed>
            <feed>2</feed>
            <thruster file="direct">
                <location unit="IN">
                    <x>  540 </x>
                    <y> -193 </y>
                    <z>  -40 </z>
                </location>
                <orient unit="DEG">
                    <roll>  0 </roll>
                    <pitch> 0 </pitch>
                    <yaw>   0 </yaw>
                </orient>
            </thruster>
        </engine>
        <engine file="CFM56">
            <location unit="IN">
                <x> 540 </x>
                <y> 193 </y>
                <z> -40 </z>
            </location>
            <orient unit="DEG">
                <roll>  0 </roll>
                <pitch> 0 </pitch>
                <yaw>   0 </yaw>
            </orient>
            <feed>1</feed>
            <feed>2</feed>
            <thruster file="direct">
                <location unit="IN">
                    <x> 540 </x>
                    <y> 193 </y>
                    <z> -40 </z>
                </location>
                <orient unit="DEG">
                    <roll>  0 </roll>
                    <pitch> 0 </pitch>
                    <yaw>   0 </yaw>
                </orient>
            </thruster>
        </engine>
        <tank type="FUEL"><!-- Left wing tank -->
            <location unit="IN">
                <x> 520 </x>
                <y> -80 </y>
                <z> -18 </z>
            </location>
            <capacity unit="LBS"> 10200 </capacity>
            <contents unit="LBS"> 10000 </contents>
            <temperature> 59.0 </temperature> <!-- Fuel temp in degrees F -->
        </tank>
        <tank type="FUEL"><!-- Right wing tank -->
            <location unit="IN">
                <x> 520 </x>
                <y>  80 </y>
                <z> -18 </z>
            </location>
            <capacity unit="LBS"> 10200 </capacity>
            <contents unit="LBS"> 10000 </contents>
        </tank>
        <tank type="FUEL"><!-- Center tank -->
            <location unit="IN">
                <x> 480 </x>
                <y>   0 </y>
                <z> -18 </z>
            </location>
            <capacity unit="LBS"> 15000 </capacity>
            <contents unit="LBS">  4000 </contents>
        </tank>


   </propulsion>


<!-- **********************************************************************
        AUTOPILOT
     ********************************************************************** -->


   <!-- Autopilot is not a required section, and DATCOM does not calculate this -->


<!-- **********************************************************************
        FLIGHT CONTROLS
     ********************************************************************** -->


   <!-- DATCOM does not calculate the flight control section -->


    <flight_control name="FCS: 737">

        <channel name="Pitch">

            <summer name="Pitch Trim Sum">
                <input>fcs/elevator-cmd-norm</input>
                <input>fcs/pitch-trim-cmd-norm</input>
                <clipto>
                    <min>-1</min>
                    <max> 1</max>
                </clipto>
            </summer>

            <aerosurface_scale name="Elevator Control">
                <input>fcs/pitch-trim-sum</input>
                <range>
                    <min>-0.3</min>
                    <max> 0.3</max>
                </range>
                <output>fcs/elevator-pos-rad</output>
            </aerosurface_scale>

            <aerosurface_scale name="Elevator Normalized">
                <input>fcs/elevator-pos-rad</input>
                <domain>
                    <min>-0.3</min>
                    <max> 0.3</max>
                </domain>
                <range>
                    <min>-1</min>
                    <max> 1</max>
                </range>
                <output>fcs/elevator-pos-norm</output>
            </aerosurface_scale>

        </channel>
        <channel name="Roll">

            <summer name="Roll Trim Sum">
                <input>fcs/aileron-cmd-norm</input>
                <input>fcs/roll-trim-cmd-norm</input>
                <clipto>
                    <min>-1</min>
                    <max> 1</max>
                </clipto>
            </summer>

            <aerosurface_scale name="Left Aileron Control">
                <input>fcs/roll-trim-sum</input>
                <range>
                    <min>-0.35</min>
                    <max> 0.35</max>
                </range>
                <output>fcs/left-aileron-pos-rad</output>
            </aerosurface_scale>

            <aerosurface_scale name="Right Aileron Control">
                <input>-fcs/roll-trim-sum</input>
                <range>
                    <min>-0.35</min>
                    <max> 0.35</max>
                </range>
                <output>fcs/right-aileron-pos-rad</output>
            </aerosurface_scale>

            <aerosurface_scale name="Left aileron Normalized">
                <input>fcs/left-aileron-pos-rad</input>
                <domain>
                    <min>-0.35</min>
                    <max> 0.35</max>
                </domain>
                <range>
                    <min>-1</min>
                    <max> 1</max>
                </range>
                <output>fcs/left-aileron-pos-norm</output>
            </aerosurface_scale>

            <aerosurface_scale name="Right aileron Normalized">
                <input>fcs/right-aileron-pos-rad</input>
                <domain>
                    <min>-0.35</min>
                    <max> 0.35</max>
                </domain>
                <range>
                    <min>-1</min>
                    <max> 1</max>
                </range>
                <output>fcs/right-aileron-pos-norm</output>
            </aerosurface_scale>

        </channel>
        <channel name="Yaw">

            <summer name="Rudder Command Sum">
                <input>fcs/rudder-cmd-norm</input>
                <input>fcs/yaw-trim-cmd-norm</input>
                <clipto>
                    <min>-1</min>
                    <max> 1</max>
                </clipto>
            </summer>

            <scheduled_gain name="Yaw Damper">
                <input>velocities/r-aero-rad_sec</input>
                <table>
                  <independentVar>velocities/mach</independentVar>
                    <tableData>
                        0.00	0.0
                        0.10	0.0
                        0.11	1.0
                    </tableData>
                </table>
            </scheduled_gain>

            <scheduled_gain name="Yaw Damper Final">
                <input>fcs/yaw-damper</input>
                <table>
                  <independentVar>velocities/mach</independentVar>
                    <tableData>
                        0.00	0.0
                        0.10	0.0
                        0.11	1.0
                    </tableData>
                </table>
            </scheduled_gain>

            <summer name="Rudder Sum">
                <input>fcs/rudder-command-sum</input>
                <input>fcs/yaw-damper-final</input>
                <clipto>
                    <min>-1</min>
                    <max> 1</max>
                </clipto>
            </summer>

            <aerosurface_scale name="Rudder Control">
                <input>fcs/rudder-sum</input>
                <range>
                    <min>-0.35</min>
                    <max> 0.35</max>
                </range>
                <output>fcs/rudder-pos-rad</output>
            </aerosurface_scale>

            <aerosurface_scale name="Rudder Normalized">
                <input>fcs/rudder-pos-rad</input>
                <domain>
                    <min>-0.35</min>
                    <max> 0.35</max>
                </domain>
                <range>
                    <min>-1</min>
                    <max> 1</max>
                </range>
                <output>fcs/rudder-pos-norm</output>
            </aerosurface_scale>

        </channel>
        <channel name="Flaps">

            <kinematic name="Flaps Control">
                <input>fcs/flap-cmd-norm</input>
                <traverse>
                    <setting>
                        <position>0</position>
                        <time>0</time>
                    </setting>
                    <setting>
                        <position>0.125</position>
                        <time>5</time>
                    </setting>
                    <setting>
                        <position>0.25</position>
                        <time>4</time>
                    </setting>
                    <setting>
                        <position>0.375</position>
                        <time>3</time>
                    </setting>
                    <setting>
                        <position>0.5</position>
                        <time>2</time>
                    </setting>
                    <setting>
                        <position>0.625</position>
                        <time>2</time>
                    </setting>
                    <setting>
                        <position>0.75</position>
                        <time>2</time>
                    </setting>
                    <setting>
                        <position>0.875</position>
                        <time>2</time>
                    </setting>
                    <setting>
                        <position>1</position>
                        <time>2</time>
                    </setting>
                </traverse>
                <output>fcs/flap-pos-norm</output>
            </kinematic>

        </channel>
        <channel name="Landing Gear">

            <kinematic name="Gear Control">
                <input>gear/gear-cmd-norm</input>
                <traverse>
                    <setting>
                        <position>0</position>
                        <time>0</time>
                    </setting>
                    <setting>
                        <position>1</position>
                        <time>5</time>
                    </setting>
                </traverse>
                <output>gear/gear-pos-norm</output>
            </kinematic>

        </channel>
        <channel name="Flight Spoilers">
          <!-- operated by the speedbrake handle and roll control -->
            <kinematic name="Flight Spoilers Control">
                <input>fcs/speedbrake-cmd-norm</input>
                <traverse>
                    <setting>
                        <position>0</position>
                        <time>0</time>
                    </setting>
                    <setting>
                        <position>1</position>
                        <time>0.6</time>
                    </setting>
                </traverse>
                <output>fcs/speedbrake-pos-norm</output>
            </kinematic>

        </channel>
        <channel name="Ground Spoilers">
          <!-- these only operate on the ground -->
            <kinematic name="Ground Spoilers Control">
                <input>fcs/spoiler-cmd-norm</input>
                <traverse>
                    <setting>
                        <position>0</position>
                        <time>0</time>
                    </setting>
                    <setting>
                        <position>1</position>
                        <time>0.6</time>
                    </setting>
                </traverse>
                <output>fcs/spoiler-pos-norm</output>
            </kinematic>

        </channel>

    </flight_control>


<!-- **********************************************************************
        AERODYNAMICS
     ********************************************************************** -->


   <!-- Link to the aerodynamics file -->

   <aerodynamics file="B-737_aero.xml"/>


<!-- ********************************************************************** -->


<!--
   OUTPUT section definition

   The following specifies the way that JSBSim writes out data

   NAME is the filename you want the output to go to

   TYPE can be:

      CSV       Comma separated data. If a filename is supplied then the data
                goes to that file. If COUT or cout is specified, the data
                goes to stdout. If the filename is a null filename
                the data goes to stdout, as well

      SOCKET    Will eventually send data to a socket output, where NAME
                would then be the IP address of the machine the data
                should be sent to. DON'T USE THIS YET!

      TABULAR   Columnar data.

      TERMINAL  Output to terminal. NOT IMPLEMENTED YET!

      NONE      Specifies to do nothing. This setting makes it easy to turn
                on and off the data output without having to mess with
                anything else.


   NOTE that Time is always output with the data.

-->

<!--

   <output name="JSBout.rec" type="CVS" rate="10">
      <simulation>       OFF </simulation>
      <atmosphere>       ON  </atmosphere>
      <atmosphere>       ON  </atmosphere>
      <massprops>        ON  </massprops>
      <aerosurfaces>     ON  </aerosurfaces>
      <rates>            ON  </rates>
      <velocities>       ON  </velocities>
      <forces>           OFF </forces>
      <moments>          OFF </moments>
      <position>         ON  </position>
      <coefficients>     OFF </coefficients>
      <ground_reactions> OFF </ground_reactions>
      <fcs>              ON  </fcs>
      <propulsion>       OFF </propulsion>

      <property>fcs/flap-pos-deg</property>

   </output>
-->
   <output name="JSBout.rec" type="TABULAR" rate="20">
      <simulation>       OFF </simulation>
      <atmosphere>       ON  </atmosphere>
      <atmosphere>       ON  </atmosphere>
      <massprops>        ON  </massprops>
      <aerosurfaces>     ON  </aerosurfaces>
      <rates>            ON  </rates>
      <velocities>       ON  </velocities>
      <forces>           OFF </forces>
      <moments>          OFF </moments>
      <position>         ON  </position>
      <coefficients>     OFF </coefficients>
      <ground_reactions> OFF </ground_reactions>
      <fcs>              ON  </fcs>
      <propulsion>       OFF </propulsion>

      <property>fcs/flap-pos-deg</property>

   </output>


</fdm_config>
